*HEADING
CalculiX Analysis
*NODE, NSET=NALL
1, 5.0000, 0.0000, 0.0000
2, 5.0000, 0.0000, -5.0000
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*ELEMENT, TYPE=S8, ELSET=ESHELLS_S8
1000001, 1, 69, 71, 6, 36, 70, 38, 5
1000002, 6, 71, 73, 8, 38, 72, 40, 7
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*ELSET, ELSET=ESHELLS
ESHELLS_S8,
*MATERIAL, NAME=MATERIAL1
*ELASTIC
30000000000.0000, 0.2000
*DENSITY
2446.4832
*SHELL SECTION, ELSET=ESHELLS, MATERIAL=MATERIAL1
0.2000, 5
*BOUNDARY
1, 1, 6, 0.0
2, 1, 6, 0.0
3, 1, 6, 0.0
4, 1, 6, 0.0
*STEP
*STATIC
*DLOAD
1000001, P, 5000.0000
1000002, P, 5000.0000
1000003, P, 5000.0000
1000004, P, 5000.0000
1000005, P, 5000.0000
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1000160, P, 5000.0000
*NODE PRINT, NSET=NALL
U, RF
*EL PRINT, ELSET=ESHELLS, OUTPUT=3D
S
*END STEP
