*HEADING
CalculiX Analysis
*NODE, NSET=NALL
1, -15.0000, 0.0000, -10.0000
2, -15.0000, 0.0000, -15.0000
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*ELEMENT, TYPE=B31, ELSET=EBEAMS
1, 3, 24
2, 4, 25
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*ELEMENT, TYPE=S4, ELSET=ESHELLS_S4
1000001, 16, 118, 119, 103
1000002, 103, 119, 120, 104
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*ELSET, ELSET=ESHELLS
ESHELLS_S4,
*MATERIAL, NAME=MATERIAL1
*ELASTIC
30000000000.0000, 0.2000
*DENSITY
2446.4832
*BEAM SECTION, ELSET=EBEAMS, MATERIAL=MATERIAL1, SECTION=RECT
0.2000, 0.3000
0.1, 0.9, 0.1
*SHELL SECTION, ELSET=ESHELLS, MATERIAL=MATERIAL1
0.2000, 5
*BOUNDARY
1, 1, 6, 0.0
2, 1, 6, 0.0
3, 1, 6, 0.0
4, 1, 6, 0.0
5, 1, 6, 0.0
6, 1, 6, 0.0
7, 1, 6, 0.0
8, 1, 6, 0.0
9, 1, 6, 0.0
10, 1, 6, 0.0
11, 1, 6, 0.0
12, 1, 6, 0.0
13, 1, 6, 0.0
14, 1, 6, 0.0
15, 1, 6, 0.0
16, 1, 6, 0.0
17, 1, 6, 0.0
18, 1, 6, 0.0
19, 1, 6, 0.0
20, 1, 6, 0.0
21, 1, 6, 0.0
22, 1, 6, 0.0
23, 1, 6, 0.0
*STEP
*STATIC
*DLOAD
1000001, P, 15000.0000
1000001, P, 15000.0000
1000002, P, 15000.0000
1000002, P, 15000.0000
1000003, P, 15000.0000
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1001940, P, 15000.0000
*NODE PRINT, NSET=NALL
U, RF
*EL PRINT, ELSET=EBEAMS
SF
*EL PRINT, ELSET=EBEAMS
S
*EL PRINT, ELSET=ESHELLS, OUTPUT=3D
S
*END STEP
