*HEADING
CalculiX Analysis
*NODE, NSET=NALL
1, -28.0000, 0.0000, -50.0000
2, 5.0000, 0.0000, 0.0000
3, 11.0000, 0.0000, 0.0000
4, 5.0000, 0.0000, -7.0000
5, 11.0000, 0.0000, -7.0000
6, 5.0000, 0.0000, -12.0000
7, 11.0000, 0.0000, -12.0000
8, 14.0000, 0.0000, -12.0000
9, 20.0000, 0.0000, -12.0000
*ELEMENT, TYPE=B31, ELSET=EBEAMS
1, 2, 3
2, 4, 5
3, 6, 7
4, 7, 8
5, 8, 9
*MATERIAL, NAME=MATERIAL1
*ELASTIC
210000000000.0000, 0.3000
*DENSITY
7850.0000
*BEAM SECTION, ELSET=EBEAMS, MATERIAL=MATERIAL1, SECTION=RECT
0.300000, 0.200000
0.0, 1.0, 0.0
*BOUNDARY
2, 1, 6, 0.0
4, 1, 6, 0.0
5, 1, 6, 0.0
6, 1, 6, 0.0
7, 1, 6, 0.0
8, 1, 6, 0.0
9, 1, 6, 0.0
*STEP
*STATIC
*DLOAD
1, P1, -15000.000000
2, P1, -15000.000000
3, P1, -15000.000000
4, P1, -15000.000000
5, P1, -15000.000000
*NODE PRINT, NSET=NALL
U, RF
*EL PRINT, ELSET=EBEAMS
S
*END STEP
